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x0 := -4
x1 := -2
x2 := 0
y0 := 2
y1 := 8
y2 := 5
L2(x) := y0*(x - x1)*(x - x2)/((x0 - x1)*(x0 - x2)) + y1*(x - x0)*(x - x2)/((x1 - x0)*(x1 - x2)) + y2*(x - x0)*(x - x1)/((x2 - x0)*(x2 - x1))
# [plot: L2(x) vs x]
