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e := 10^-6
Simpson(f, a, b, e) :=
    Sum(h, m) ← sum(f(a + (2*k + 1)*h), k = 0 .. m)
    n ← 1
    S ← f(a) + f(b)
    h ← (b - a)/2
    P ← 0
    m ← 0
    Q ← f((a + b)/2)
    Integ1 ← 10^10
    Integ2 ← 2*h/3*(S/2 + 4*Q)
    while |Integ1 - Integ2| ≥ e
        m ← 2^n - 1
        n ← n + 1
        h ← h/2
        P ← P + Q
        Q ← Sum(h, m)
        Integ1 ← Integ2
        Integ2 ← 2*h/3*(S/2 + 2*Q + P)
    [Integ2, n]
a := 2
b := 3
n1 := 10
h1 := (b - a)/n1 = 0.1
n2 := 20
h2 := (b - a)/n2 = 0.05
i1 := 0 .. n1
i2 := 0 .. n2
x[0] := a
x1[i1] := x[0] + i1*h1
x2[i2] := x[0] + i2*h2
y1[10, :] := x1^2*cos(x1/4) = [55.6637]
y2[20, :] := x2^2*cos(x2/4) = [106.282]
y1 = [0; 0; 0; 0; 0; 0; 0; 0; 0; 0; 55.6637]
y2 = [0; 0; 0; 0; 0; 0; 0; 0; 0; 0; 0; 0; 0; 0; 0; 0; 0; 0; 0; 0; 106.282]
s1 := h1*((y1[0] + y1[n1])/2 + sum(y1[i1], i1 = 1 .. n1 - 1)) = 2.78319
s2 := h2*((y2[0] + y2[n2])/2 + sum(y2[i2], i2 = 1 .. n2 - 1)) = 2.65705
f(x) := x*cos(x/4)
integral(f(x), x = a .. b) → 12*sin(3/4) + (16*cos(3/4) - 16*cos(1/2) - 8*sin(1/2)) = 2.00996
I := Simpson(f, a, b, e) = [2.00996, 3]
# Сравнение точности методов
R1 := max(|y2^2|)*|b - a|*h1^2/12 = 9.4132
R2 := max(|y2^2|)*|b - a|*h2^2/12 = 2.3533
h := (b - a)/2
Rsim := max(|f(x)^4|)*|b - a|*h^4/180 = 0.00329518
R1 > R2 > Rsim → 1
