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# Шаг 1. Импорт контейнера и разложение на цветовые каналы R, G, B
# ORIGIN:=0 задаёт нумерацию массивов с нуля. C — контейнер как упакованный массив трёх цветовых матриц. R, G, B — отдельные каналы (интенсивности красного, зелёного и синего) в виде числовых матриц со значениями 0..255.
ORIGIN := 0
# Контейнер (исходное изображение) | Канал R (градации серого)
C := READRGB("container.bmp")
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R := READ_RED("container.bmp")
G := READ_GREEN("container.bmp")
B := READ_BLUE("container.bmp")
# Шаг 2-3. Импорт сообщения и параметры шифра Виженера | Канал G (градации серого)
# Stego — контейнер со скрытым сообщением
# M — сообщение, прочитанное как вектор байтов (коды символов cp1251). Na=256 — размер алфавита источника. K — секретный ключ Виженера, Nk — его длина, Nm — длина сообщения в байтах.
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M := READBIN("prim.txt", "byte")
Na := 256
K := "@JeKc-I980"
# Канал B (градации серого)
Nk := strlen(K)
Nm := rows(M)
# Модуль M.1 — расширение ключа на длину сообщения
# K1 — ключ, циклически растянутый на всю длину сообщения: K1[i] = K[i mod Nk]. Нужен, чтобы каждому символу сообщения соответствовал свой символ ключа.
K1 :=
    K ← str2vec(K)
    for i ∈ 0 .. Nm - 1
        r ← mod(i, Nk)
        K1[i] ← K[r]
    K1
# Модуль M.2 — шифрование сообщения (mod 256)
# M_cod — шифротекст: к коду каждого символа прибавляется соответствующий символ ключа по модулю 256 (модифицированный шифр Виженера).
M_cod :=
    for j ∈ 0 .. Nm - 1
        M_cod[j] ← mod(M[j] + K1[j], Na)
    M_cod
# Шаг 4. Обрамление шифротекста метками начала и конца
# sMe — шифротекст, обрамлённый секретными метками начала (n0G@m0k) и конца (KiHeu,6). stack соединяет векторы по вертикали. Метки нужны, чтобы при извлечении найти границы сообщения.
m_start := "n0G@m0k"
m_end := "KiHeu,6"
sMe := stack(str2vec(m_start), M_cod, str2vec(m_end))
Nk = 10
Nm = 393
submatrix(M, 0, 15, 0, 0) = [204; 229; 242; 238; 228; 32; 231; 224; 236; 229; 237; 251; 32; 237; 224; 232]
submatrix(M_cod, 0, 15, 0, 0) = [12; 47; 87; 57; 71; 77; 48; 25; 36; 21; 45; 69; 133; 56; 67; 21]
rows(sMe) = 407
8*rows(sMe) = 3256
3*rows(C)*cols(C) = 288000
# Модули M.3-M.4 — перевод двоичное <-> десятичное
# B2D переводит 8-битное двоичное число (вектор, младший разряд первый) в десятичное. D2B выполняет обратное преобразование — десятичное в вектор из 8 бит.
B2D(x) := sum(x[i]*2^i, i = 0 .. 7)
D2B(x) :=
    for i ∈ 0 .. 7
        V[i] ← mod(x, 2)
        x ← floor(x/2)
    V
# Модуль M.5 — развёртка контейнера в вектор (порядок B-G-R)
# Cv — контейнер, развёрнутый в один вектор. Порядок каналов временно меняется на B-G-R для защиты. augment соединяет матрицы по столбцам, stack — по вертикали.
Cv :=
    C1 ← augment(B, G, R)
    Cv ← C1[:, 0]
    for i ∈ 1 .. cols(C1) - 1
        Cv ← stack(Cv, C1[:, i])
    Cv
rows(Cv) = 96000
# Модуль M.6 — встраивание битов сообщения в НЗБ
# Sv — вектор со встроенным сообщением. В младший бит каждого элемента пишется очередной бит sMe. После сообщения оставшиеся младшие биты заполняются случайно — это маскирует границу скрытых данных.
Sv :=
    for m ∈ 0 .. rows(sMe) - 1
        b ← D2B(sMe[m])
        for i ∈ 0 .. 7
            P ← D2B(Cv[i + 8*m])
            P[0] ← b[i]
            Sv[i + 8*m] ← B2D(P)
    for j ∈ rows(Sv) .. rows(Cv) - 1
        P ← D2B(Cv[j])
        P[0] ← round(rnd(1))
        Sv[j] ← B2D(P)
    Sv
# Модули M.7-M.8 — свёртка вектора и восстановление каналов
# S1 — вектор Sv, свёрнутый обратно в матрицу размера контейнера. B_M, G_M, R_M — выделенные каналы; S — итоговый stego-контейнер с восстановленным порядком R-G-B.
S1 :=
    for i ∈ 0 .. cols(C) - 1
        S1[:, i] ← submatrix(Sv, i*rows(C), (i + 1)*rows(C) - 1, 0, 0)
    S1
B_M := submatrix(S1, 0, rows(C) - 1, 0, cols(C)/3 - 1)
G_M := submatrix(S1, 0, rows(C) - 1, cols(C)/3, 2*cols(C)/3 - 1)
R_M := submatrix(S1, 0, rows(C) - 1, 2*cols(C)/3, cols(C) - 1)
S := augment(R_M, G_M, B_M)
# ИЗВЛЕЧЕНИЕ. Модуль M.9 — развёртка stego в вектор
# Sv1 — stego-контейнер, развёрнутый в вектор так же, как при встраивании. С него начинается извлечение скрытого сообщения.
R1 := R_M
G1 := G_M
B1 := B_M
Sv1 :=
    S1 ← augment(B1, G1, R1)
    Sv1 ← S1[:, 0]
    for i ∈ 1 .. cols(S1) - 1
        Sv1 ← stack(Sv1, S1[:, i])
    Sv1
# Модуль M.10 — извлечение квазисообщения из НЗБ
# Mf — квазисообщение: из младших битов каждой восьмёрки элементов собирается байт. Служебным кодам (меньше 32) прибавляется 32.5, чтобы строковые функции могли их обработать.
Mf :=
    for m ∈ 0 .. rows(Sv1)/8 - 1
        for i ∈ 0 .. 7
            P ← D2B(Sv1[i + 8*m])
            b[i] ← P[0]
        Mf[m] ← B2D(b)
        if Mf[m] < 32
            Mf[m] ← Mf[m] + 32.5
    Mf
# Модуль M.11 — позиции служебных символов
# N — таблица позиций элементов, которым прибавили 32.5 (бывшие служебные символы). По ней позже восстанавливаются исходные значения.
N :=
    for s ∈ 0 .. 31
        i ← 0
        for m ∈ 0 .. rows(Mf) - 1
            if Mf[m] == s + 32.5
                N[i, s] ← m
                i ← i + 1
    N
m1_start := "n0G@m0k"
m1_end := "KiHeu,6"
# Модуль M.12 — выделение шифротекста по меткам
# M_cod1 — шифротекст, выделенный между метками. substr ищет метки в строке, str2vec переводит строку обратно в коды. Служебные символы восстанавливаются по таблице N.
M_cod1 :=
    s ← 0
    e ← 0
    bs ← strlen(m1_start)
    be ← strlen(m1_end)
    Mf ← vec2str(Mf)
    for m ∈ 0 .. strlen(Mf) - 1
        if substr(Mf, m, bs) == m1_start and s == 0
            s ← m + bs
        if substr(Mf, m, be) == m1_end and e == 0
            e ← m - 1
        if s ≠ 0 and e ≠ 0
            break
    Mf ← substr(Mf, s, e - s + 1)
    M_cod1 ← str2vec(Mf)
    for n ∈ 0 .. cols(N) - 1
        for i ∈ 0 .. rows(N) - 1
            if N[i, n] == 0
                break
            if N[i, n] > e
                break
            if s ≤ N[i, n] and N[i, n] ≤ e
                M_cod1[N[i, n] - bs] ← n
    M_cod1
rows(M_cod1) = 393
# Модули M.13-M.14 — расшифровка сообщения
# K11 — растянутый ключ (как в M.1). M1 — расшифрованное сообщение: из кода вычитается символ ключа по модулю 256 (обратная операция к шифрованию).
K11 :=
    K ← str2vec(K)
    for i ∈ 0 .. Nm - 1
        r ← mod(i, Nk)
        K1[i] ← K[r]
    K1
M1 :=
    for j ∈ 0 .. Nm - 1
        M[j] ← mod(Na + M_cod1[j] - K11[j], Na)
    M
rows(M1) = 393
# Проверка корректности: err = 0 означает побайтовое совпадение
# err — число несовпавших байтов расшифрованного M1 и исходного M. err=0 означает точное восстановление. vec2str(M1) показывает текст (кириллица как Latin-1 — это нормально, важны коды).
err :=
    s ← 0
    for j ∈ 0 .. Nm - 1
        if M1[j] ≠ M[j]
            s ← s + 1
    s
err = 0
submatrix(M1, 0, 15, 0, 0) = [204; 229; 242; 238; 228; 32; 231; 224; 236; 229; 237; 251; 32; 237; 224; 232]
vec2str(M1) = "Метод замены наименее значащего бита (НЗБ) наиболее распространён среди методов замены в пространственной области. Младший бит изображения несёт меньше всего информации, поэтому его можно использовать для встраивания секретного сообщения. Человек не способен заметить изменение этого бита, так как фактически НЗБ - это шум. Перед скрытием сообщение защищается модифицированным шифром Виженера."
